rksm
u := 1
w := 0
r := 8314.472
etano
propano
omegaa := 0.45723553
Tc1 := 305.43
Tc2 := 369.82
omegab := 0.077796074
Pc1 := 48.1595*101325
Pc2 := 41.9396*101325
r1 := 0.378893
omega1 := 0.09781
omega2 := 0.15416
r2 := 1.4897153
q1 := 0.02669
q2 := 0.03136
r3 := -0.17131848
r4 := 0.0196554
Temp := 298
Tr2 := Temp/Tc2 = 0.805797
a(omega, Tc, Pc, Tr, q) := omegaa*(r*Tc)^2/Pc*alpha(omega, Tr)  # error: This variable is undefined.
Tr1 := Temp/Tc1 = 0.975674
Tr := 0.5
mmm(omega) := r1 + r2*omega + r3*omega^2 + r4*omega^3
mmm(omega1) = 0.522981
x := if(Tr < 1, 1, 0) = 1
alpha(omega, Tr, q) := (1 + mmm(omega)*(1 - sqrt(Tr)) + x*q*(1 - Tr)*(0.7 - Tr))^2
alpha(omega1, Tr, q1) = 1.33598
mmm(omega1) = 0.522981
alphaderiv(omega, Tr, q) := 1/sqrt(alpha(omega, Tr, q))*(-mmm(omega)*sqrt(Tr) - x*q*(3.4*Tr - 4*Tr^2))
oneover(omega, Tr, q) := 1/sqrt(alpha(omega, Tr, q))
second(Tr, q) := x*q*(3.4*Tr - 4*Tr^2)
second(Tr, q1) = 0.018683
oneover(omega1, Tr, q1) = 0.865167
alphaderiv(omega1, Tr, q1) = -0.336106
